// SBML level 1 version 2

model model()

  // Compartments:
  compartment univ = 1;

  // Species:
  species $A in univ = 0.03333333/univ;
  species AAA in univ = 0.03333333/univ;
  species AAAA in univ = 0.03333333/univ;
  species AAAAABB in univ = 0;
  species AAAAB in univ = 0;
  species AAAB in univ = 0.03333333/univ;
  species AAB in univ = 0.03333333/univ;
  species AABA in univ = 0.03333333/univ;
  species AABAABB in univ = 0;
  species AABABABB in univ = 0;
  species AABB in univ = 0.03333333/univ;
  species AB in univ = 0.03333333/univ;
  species ABA in univ = 0.03333333/univ;
  species ABAA in univ = 0.03333333/univ;
  species ABAAAA in univ = 0;
  species ABAABAAA in univ = 0;
  species ABB in univ = 0.03333333/univ;
  species ABBAB in univ = 0;
  species ABBB in univ = 0.03333333/univ;
  species $B in univ = 0.03333333/univ;
  species BAA in univ = 0.03333333/univ;
  species BAAA in univ = 0.03333333/univ;
  species BAB in univ = 0.03333333/univ;
  species BABA in univ = 0.03333333/univ;
  species BABAAAA in univ = 0;
  species BABAAABB in univ = 0;
  species BABB in univ = 0.03333333/univ;
  species BABBAABA in univ = 0;
  species $BB in univ = 0.03333333/univ;
  species BBA in univ = 0.03333333/univ;
  species BBAA in univ = 0.03333333/univ;
  species BBAAABAA in univ = 0;
  species BBAABAA in univ = 0;
  species BBAABAB in univ = 0;
  species BBAB in univ = 0.03333333/univ;
  species BBB in univ = 0.03333333/univ;
  species BBBA in univ = 0.03333333/univ;
  species BBBB in univ = 0.03333333/univ;
  species BBBBABA in univ = 0;

  // Parameters:
  AA = 0.03333333;
  ABAB = 0.03333333;
  ABBA = 0.03333333;
  BA = 0.03333333;
  BAAB = 0.03333333;

  // Reactions:
  cleavage1: AAB + BAA => AAB; cleavage1___RATE__*AAB*BAA;
    cleavage1___RATE__ = 25;
  cleavage10: ABA + AAA => ABA; cleavage10___RATE__*ABA*AAA;
    cleavage10___RATE__ = 25;
  cleavage12: ABBAB + ABAA => ABA + ABBAB; cleavage12___RATE__*ABBAB*ABAA;
    cleavage12___RATE__ = 25;
  cleavage13: BBA + ABBB => ABBB; cleavage13___RATE__*BBA*ABBB;
    cleavage13___RATE__ = 25;
  cleavage14: BBAA + BABB => BAA + BABB; cleavage14___RATE__*BBAA*BABB;
    cleavage14___RATE__ = 25;
  cleavage15: AAAB + ABBB => AAAB + BBB; cleavage15___RATE__*AAAB*ABBB;
    cleavage15___RATE__ = 25;
  cleavage16: ABB + BBAA => BBAA; cleavage16___RATE__*ABB*BBAA;
    cleavage16___RATE__ = 25;
  cleavage18: AABB + BAAA => ABB + BAAA; cleavage18___RATE__*AABB*BAAA;
    cleavage18___RATE__ = 25;
  cleavage2: BBBA + AAB => BBBA; cleavage2___RATE__*BBBA*AAB;
    cleavage2___RATE__ = 25;
  cleavage20: 2 BBBB => BBB + BBBB; cleavage20___RATE__*BBBB^2;
    cleavage20___RATE__ = 25;
  cleavage21: BBBB + ABAA => BBBB + BAA; cleavage21___RATE__*BBBB*ABAA;
    cleavage21___RATE__ = 25;
  cleavage23: BABB + ABBB => ABBB; cleavage23___RATE__*BABB*ABBB;
    cleavage23___RATE__ = 25;
  cleavage25: BBBA + BABA => BBA + BABA; cleavage25___RATE__*BBBA*BABA;
    cleavage25___RATE__ = 25;
  cleavage26: BBAB + AAAAABB => BBA + AAAAABB; cleavage26___RATE__*BBAB*AAAAABB;
    cleavage26___RATE__ = 25;
  cleavage27: AAAAABB + AABA => ABA + AAAAABB; cleavage27___RATE__*AAAAABB*AABA;
    cleavage27___RATE__ = 25;
  cleavage3: BAA + BABA => BAA + BAB; cleavage3___RATE__*BAA*BABA;
    cleavage3___RATE__ = 25;
  cleavage4: AB + BAAA => BAAA; cleavage4___RATE__*AB*BAAA;
    cleavage4___RATE__ = 25;
  cleavage5: AABB + BAB => AABB; cleavage5___RATE__*AABB*BAB;
    cleavage5___RATE__ = 25;
  cleavage6: BBAA + BABB => ABB + BBAA; cleavage6___RATE__*BBAA*BABB;
    cleavage6___RATE__ = 25;
  cleavage8: BBA + BBAB => BBA; cleavage8___RATE__*BBA*BBAB;
    cleavage8___RATE__ = 25;
  complexation0: AAAA + $B => AAAAB; complexation0___RATE__*AAAA*B;
    complexation0___RATE__ = 50;
  complexation11: BBB + BABA => BBBBABA; complexation11___RATE__*BBB*BABA;
    complexation11___RATE__ = 50;
  complexation17: BBAA + BAA => BBAABAA; complexation17___RATE__*BBAA*BAA;
    complexation17___RATE__ = 50;
  complexation19: ABA + AAA => ABAAAA; complexation19___RATE__*ABA*AAA;
    complexation19___RATE__ = 50;
  complexation22: BBAA + ABAA => BBAAABAA; complexation22___RATE__*BBAA*ABAA;
    complexation22___RATE__ = 50;
  complexation24: BABB + AABA => AABABABB; complexation24___RATE__*BABB*AABA;
    complexation24___RATE__ = 50;
  complexation7: ABB + AABA => AABAABB; complexation7___RATE__*ABB*AABA;
    complexation7___RATE__ = 50;
  complexation9: BBAA + BAB => BBAABAB; complexation9___RATE__*BBAA*BAB;
    complexation9___RATE__ = 50;
  condensation0: $BB + AAAAB => AAAA + BBB; condensation0___RATE__*BB*AAAAB;
    condensation0___RATE__ = 50;
  condensation11: AABB + BBBBABA => BABAAABB + BBB; condensation11___RATE__*AABB*BBBBABA;
    condensation11___RATE__ = 50;
  condensation17: BBAABAA + $A => BBAA + BAAA; condensation17___RATE__*BBAABAA*A;
    condensation17___RATE__ = 50;
  condensation19: ABAAAA + AABB => ABA + AAAAABB; condensation19___RATE__*ABAAAA*AABB;
    condensation19___RATE__ = 50;
  condensation22: BBAAABAA + BAAA => ABAABAAA + BBAA; condensation22___RATE__*BBAAABAA*BAAA;
    condensation22___RATE__ = 50;
  condensation24: AABABABB + AABA => BABBAABA + AABA; condensation24___RATE__*AABABABB*AABA;
    condensation24___RATE__ = 50;
  condensation7: AB + AABAABB => ABBAB + AABA; condensation7___RATE__*AB*AABAABB;
    condensation7___RATE__ = 50;
  condensation9: AAAA + BBAABAB => BABAAAA + BBAA; condensation9___RATE__*AAAA*BBAABAB;
    condensation9___RATE__ = 50;
  decomplexation0: AAAAB => AAAA; decomplexation0___RATE__*AAAAB;
    decomplexation0___RATE__ = 1e-6;
  decomplexation11: BBBBABA => BBB + BABA; decomplexation11___RATE__*BBBBABA;
    decomplexation11___RATE__ = 1e-6;
  decomplexation17: BBAABAA => BBAA + BAA; decomplexation17___RATE__*BBAABAA;
    decomplexation17___RATE__ = 1e-6;
  decomplexation19: ABAAAA => ABA + AAA; decomplexation19___RATE__*ABAAAA;
    decomplexation19___RATE__ = 1e-6;
  decomplexation22: BBAAABAA => BBAA + ABAA; decomplexation22___RATE__*BBAAABAA;
    decomplexation22___RATE__ = 1e-6;
  decomplexation24: AABABABB => BABB + AABA; decomplexation24___RATE__*AABABABB;
    decomplexation24___RATE__ = 1e-6;
  decomplexation7: AABAABB => ABB + AABA; decomplexation7___RATE__*AABAABB;
    decomplexation7___RATE__ = 1e-6;
  decomplexation9: BBAABAB => BBAA + BAB; decomplexation9___RATE__*BBAABAB;
    decomplexation9___RATE__ = 1e-6;

  // Unit definitions:
  unit volume = dimensionless;
  unit substance = item;
end
